C_bus := (ΔI_L*T_s/(8*(0.1 V)))  # error: This variable is undefined. Check that the label is set correctly.
# Inductor Design
L := 70 μH
I_L_avg := 6 A
ΔI_L := 12 A
I_L_peak_worst := 12 A
R_L := 0.5 Ω
ρ := 1.724*10^-6 Ω*1 cm
B_max := 0.3 T
K_u := 0.5
K_g_min := (ρ*L^2*I_L_peak_worst^2)/(B_max^2*K_u*R_L) = 0.00540646 cm^5
K_g_min = 0.00540646 cm^5
# EE22 core is selected as the core has Kg greater than minimum Kg calculated
# Parameters of selected core are
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K_g := 8.26*10^-3 cm^5
A_c := 0.41 cm^2
W_A := 0.196 cm^2
MLT := 3.99 cm
l_m := 3.96 cm
# Theortical Calculation
l_g := (μ_0*L*I_L_peak_worst^2)/(B_max^2*A_c) = 3.43276 mm
N := (L*I_L_peak_worst)/(B_max*A_c) = 68.2927
A_wire_min := (K_u*W_A)/N = 0.001435 cm^2
# Skin depth calculation
f_s := 100 kHz
δ := sqrt((ρ/(π*μ_0*f_s))) = 0.0208972 cm
# To have Rac = Rdc , h<<δ
# Assume
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h := 0.01 cm
d_wire_max := h*sqrt((4/π)) = 0.0112838 cm
# AWG wire 39
A_wire_single := 0.06207*10^-3 cm^2
# Calculating number of wires in parallel Np
N_p := A_wire_min/A_wire_single = 23.1191
# Practical Calculation
l_g_real := 3.5 mm
N_real := 69
N_p_real := 23
A_wire_real := N_p_real*A_wire_single = 0.00142761 cm^2
R := (ρ*N_real*MLT)/A_wire_real = 0.332468 Ω
L := (μ_0*A_c*N_real^2)/l_g_real = 70.0848 μH
# Core loss Calculation
H_Acmax := N_real/(l_m + 2200*l_g_real)*(I_L_avg + ΔI_L/2) = 106.982 A/m
B_max := 2200 μ_0*H_Acmax = 0.295763 T
P_v := 277.2 kW/m^3
H_Acmin := N_real/l_m*(I_L_avg - ΔI_L/2) = 0 A/m
B_min := 2200*μ_0*H_Acmin = 0 T
P := P_v*l_m*A_c = 450.062 mW
B_max := 0.2 T
# EE30 core is selected as the core has Kg greater than minimum Kg calculated
# Parameters of selected core are
K_g_min := (ρ*L^2*I_L_peak_worst^2)/(B_max^2*K_u*R_L) = 0.012194 cm^5
K_g := 85.7*10^-3 cm^5
K_g_min = 0.012194 cm^5
A_c := 1.09 cm^2
W_A := 0.476 cm^2
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MLT := 6.60 cm
l_m := 5.77 cm
# Theortical Calculation
l_g := (μ_0*L*I_L_peak_worst^2)/(B_max^2*A_c) = 2.90877 mm
N := (L*I_L_peak_worst)/(B_max*A_c) = 38.5788
A_wire_min := (K_u*W_A)/N = 0.00616919 cm^2
# Skin depth calculation
f_s := 100 kHz
δ := sqrt((ρ/(π*μ_0*f_s))) = 0.0208972 cm
# To have Rac = Rdc , h<<δ
# Assume
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h := 0.02 cm
d_wire_max := h*sqrt((4/π)) = 0.0225676 cm
# AWG wire 34
A_wire_single := 0.2011*10^-3 cm^2
# Calculating number of wires in parallel Np
N_p := A_wire_min/A_wire_single = 30.6772
# Practical Calculation
l_g_real := 3 mm
N_real := 39
N_p_real := 30
A_wire_real := N_p_real*A_wire_single = 0.006033 cm^2
R := (ρ*N_real*MLT)/A_wire_real = 0.073555 Ω
L := (μ_0*A_c*N_real^2)/l_g_real = 69.4455 μH
# Core loss Calculation
H_Acmax := N_real/(l_m + 2200*l_g_real)*(I_L_avg + ΔI_L/2) = 70.2945 A/m
B_max := 2200 μ_0*H_Acmax = 0.194336 T
P_v := 126.99 kW/m^3
H_Acmin := N_real/l_m*(I_L_avg - ΔI_L/2) = 0 A/m
B_min := □  # error: Missing term or expression.
P := P_v*l_m*A_c = 798.678 mW
